Т1w' := 1150
Кпер := -0.08
Tk' := 683.2
Кср := 0.05
Квт := -0.15
Tgrf'per := Т1w' + Кпер*(Т1w' - Tk') = 1112.66
Tgrf'CP := Т1w' + Кср*(Т1w' - Tk') = 1173.34
Tgrf'vtul := Т1w' + Квт*(Т1w' - Tk') = 1079.98
n := 14860
ω := (3.14*n)/30 = 1555.35
r1 := 0.1859
u := ω*r1 = 289.139
u^2 = 83601.3
Lper := 0.1046
Lcr := 0.082
Lkor := 0.0596
ΔΤцпер := (u^2*Lper)/(1100*r1) = 42.7635
ΔΤцср := (u^2*Lcr)/(1100*r1) = 33.5239
ΔΤцk := (u^2*Lkor)/(1100*r1) = 24.3662
ΔΤзак := 70
ΔΤконв := 20
Тохл''per := Tk' + (-ΔΤзак) + ΔΤцпер + ΔΤконв = 675.963
Тохл''cr := Tk' + (-ΔΤзак) + ΔΤцср + ΔΤконв = 666.724
Тохл''к := Tk' + (-ΔΤзак) + ΔΤцk + ΔΤконв = 657.566
Qper := (Tgrf'per - 1080)/(Tgrf'per - Тохл''per) = 0.0747803
Qcr := (Tgrf'CP - 1080)/(Tgrf'CP - Тохл''cr) = 0.184242
Qk := (Tgrf'vtul - 1080)/(Tgrf'vtul - Тохл''cr) = -4.83961e-5
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ρг := 0.242
Reкр := 1.5*10^5
μг := 47.2*10^-6
wпер := 181
wср := 224.9
wк := 280.4
Given
0.242*wпер*Xкпер/μг == 1.6*Reкр
Xкпер := Find(Xкпер) → 0.25861832793
Given
0.242*wср*Xкср/μг == 1.6*Reкр
Xкср := Find(Xкср) → 0.208136582283
Given
0.242*wк*Xкк/μг == 1.6*Reкр
Xкк := Find(Xкк) → 0.166939790854
Xкпер = 0.258618
Xкср = 0.208137
Xкк = 0.16694
